VAX := READPRN("C:\Documents and Settings\MASTER\Рабочий стол\circuit2_12_40.LIB")
VAX = [
    0, 0;
    0.0399992, 2e-7;
    0.0799984, 3e-7;
    0.119998, 5e-7;
    0.159997, 6e-7;
    0.199996, 8e-7;
    0.239995, 1e-6;
    0.279994, 1.2e-6;
    0.319992, 1.5e-6;
    0.359985, 2.2e-6
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]
VAX[:, 0] = [
    0; 0.0399992; 0.0799984; 0.119998; 0.159997; 0.199996; 0.239995; 0.279994; 0.319992; 0.359985
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]
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