i := 0 .. 5
Fmax[i] := 399950, 460630, 474600, 485036, 489896, 495770
VVAR[i] := 0, -5, -10, -15, -20, -25
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Fr[i] := Fmax[i]
pi := 3.14
Lk := 10^-3
Ck := 10^-10
Cd := -(Ck*Lk - 1/(4*Fr^2*pi^2))/Lk
Fr := 1/(2*pi*sqrt((Ck + Cd)*Lk))
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M := 0.8
CJ0 := 1.7*10^-12
VJ0 := 0.15
U := -10, -8 .. 0
Cd(U) := CJ0*(1 - U/VJ0)^(-M)
Cd(U) = [5.83645e-14; 6.95658e-14; 8.71409e-14; 1.19367e-13; 2.02009e-13; 1.7e-12]
U = [-10; -8; -6; -4; -2; 0]
Given
[5.836*10^-14] == CJ0*(1 - (-10/VJ0))^(-M)
[2.02*10^-13] == CJ0*(1 - (-2/VJ0))^(-M)
[8.714*10^-14] == CJ0*(1 - (-6/VJ0))^(-M)
[1.194*10^-13] == CJ0*(1 - (-4/VJ0))^(-M)
Find(CJ0, VJ0, M) = [1.65726e-12; 0.155879; 0.801198]
