VAX := READPRN("C:\Users\user\Downloads\LR_3_3_6.lvm")
Rb := 1.2
Is0 := 0.000002
m := 2
Ft := 0.02
Given
VAX[:, 0][0] == VAX[:, 1][0]*Rb + ln((Is0 + VAX[:, 1][0])/Is0)*m*Ft
VAX[:, 0][1] == VAX[:, 1][1]*Rb + ln((Is0 + VAX[:, 1][1])/Is0)*m*Ft
VAX[:, 0][2] == VAX[:, 1][2]*Rb + ln((Is0 + VAX[:, 1][2])/Is0)*m*Ft
VAX[:, 0][3] == VAX[:, 1][3]*Rb + ln((Is0 + VAX[:, 1][3])/Is0)*m*Ft
Diod_P := Minerr(Is0, Rb, m, Ft)
Diod_P = [2.14976e-5; -22026.1; 0.000896673; 8.87372e-6]
Idiod := VAX[:, 1]
Uformula(Idiod) := Idiod*Rb + m*Ft*ln((Idiod + Is0)/Is0)
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